// COMSOL Multiphysics 5.4.0.246 model "1+2d-simulation-setup.mph"
// Outline of the model tree
// Unit system: none

Parameters
  kD = 0.1
  kdD = 0.1
  kdE = 0.15
  kde = 0.5
  DD = 60
  DE = 60
  Dd = 0.013
  Dde = 0.013
  lambda = 6
  L = 500
  nD = 400
  nE = 280
  height = 2 * 10

Functions
  rn1: Random "Random Function" | funcname = rand; nargs = 3; seed = 1

Variables
  var1 "Variables 1"
    fDT = -(kD+kdD*md)*cDT
    fDD = kde*mde
    fE = kde*mde-kdE*md*cE
    rd = (kD+kdD*md)*cDT-kdE*md*cE
    rde = kdE*md*cE-kde*mde
    rDT = lambda*cDD
    rDD = -lambda*cDD
    rE = 0

Selections
  sel1: Explicit "Membrane" on boundaries 2, 3

Couplings
  linext1: LinearExtrusion on boundaries 2
    opname = linextBottom
    srcvertex1 = points 1
    dstvertex1 = points 3
    dstgeom = geom1
    srcmap = {x, y}
  linext2: LinearExtrusion on boundaries 3
    opname = linextTop
    srcvertex1 = points 2
    dstvertex1 = points 4
    dstgeom = geom1
    srcmap = {x, y}

Geometry
  geom1 "Geometry 1" (2D, length unit m)
    r1: Rectangle | size = {L, height}
    fin: Finalize "Form Union"

Physics
  g: GeneralFormPDE "Bulk Dynamics" on all domains
    dependent variable c = {cDT, cDD, cE}
    ShapeProperty.order = 1
    Units.CustomSourceTermUnit = 1
    gfeq1: GeneralFormPDE (default)
      f = {rDT, rDD, rE}
      Ga = {{-DD*cDTx, -DD*cDTy}, {-DD*cDDx, -DD*cDDy}, {-DE*cEx, -DE*cEy}}
      da = 1
    zflx1: ZeroFluxBoundary "Zero Flux 1" (default)
    init1: init "Initial Values 1" (default) | cDT = nD*(1+0.01*rand(x,y,1)); cE = nE*(1+0.01*rand(x,y,2))
    flux1: FluxBoundary "Flux/Source 1" on boundaries 2, 3 | g = {fDT, fDD, fE}
    pc1: PeriodicCondition on boundaries 1, 4 | destinationDomains: boundaries 4
  gb: GeneralFormBoundaryPDE "Membrane Dynamics" on boundaries 2, 3
    dependent variable m = {md, mde}
    ShapeProperty.order = 1
    Units.CustomSourceTermUnit = 1
    gfeq1: GeneralFormPDE (default)
      f = {rd, rde}
      Ga = {{-Dd*mdTx, -Dd*mdTy}, {-Dde*mdeTx, -Dde*mdeTy}}
      da = {1, 0, 0, 1}
    init1: init "Initial Values 1" (default)
    zflx1: ZeroFluxBoundary "Zero Flux 1" (disabled) on points 1-4
    cons1: Constraint "PBC Constraint Bottom" on points 3 | R = {linextBottom(md)-md, linextBottom(mde)-mde}
    cons2: Constraint "PBC Constraint Top" on points 4 | R = {linextTop(md)-md, linextTop(mde)-mde}

Mesh
  mesh1 "Mesh 1"
    size: MeshSizeDefault "Bulk Mesh Size" | hmax = 5; custom = on; hmin = 0.1
    ftri1: FreeTri "Bulk and Membrane Mesh" on remaining entities
      size1: Size "Membrane Mesh Size" on boundaries 2, 3 | hmax = 0.2; custom = on

Studies
  std1 "Study 1"
    time: Transient "Time Dependent"
      tlist = range(0,0.5,3000), 3000+range(10,10,5000), 8000+range(0.5,0.5,1000)
      usertol = on
      rtol = 1e-6
      discretization = {g, physics, gb, physics}

Solver configurations
  sol1 "Solution 1" (study std1)
    v1: Variables "Dependent Variables 1"
    t1: Time "Time-Dependent Solver 1"
      tlist = range(0,0.5,3000), 3000+range(10,10,5000), 8000+range(0.5,0.5,1000)
      rtol = 1e-6
      atolglobalvaluemethod = manual
      atolglobal = 1e-5
      initialstepbdf = 1e-4
      bwinitstepfrac = 1e-5
      dDef: Direct | linsolver = pardiso

Datasets
  dset1: Solution | solution = sol1
  edg1: Edge2D "Membrane Bottom" on boundaries 2 | data = dset1
  edg2: Edge2D "Membrane Top" on boundaries 3 | data = dset1
  par1: Parametric1D "Kymograph Data" | data = edg2; interp = range(8000,1,9000)

Plots
  pg2: PlotGroup1D "Membrane Density" | data = none
    lngr1: LineGraph | data = edg1; expr = md+mde; xdata = expr; xdataexpr = x
    lngr2: LineGraph on selection sel1 | data = edg2; expr = md+mde; xdata = expr; xdataexpr = x
  pg1: PlotGroup2D "Kymograph" | data = none
    surf1: Surface | data = par1; expr = md; descr = Dependent variable md
  pg5: PlotGroup2D "Cytosol Density" | data = dset1
    surf1: Surface | expr = cE; descr = Dependent variable cE
      filt1: Filter | expr = x<150

Exports
  anim1: Animation "Cytosol Frames"
    type = imageseq
    framesel = all
    width = 5*150
    height = 5*6
    frametime = 1/25
    options = on
    axes = off
    synchronize = off
  data1: Data "Membrane Data"
    data = edg2
    expr = {md, mde, cDT, cDD, cE}
    filename = E:\fbrauns\Comsol Data\Setup\Min 2D Box\Oscillatory Medium nE=290 h=2x4 to 2x10\h=2x7_nE=290_t=8000-9000-0.5_x=0-500-0.5_mem-top.txt
    location = regulargrid
    regulargridx1 = 1000
    sort = on