// COMSOL Multiphysics 5.4.0.246 model "2+3d-simulation-setup.mph"
// Outline of the model tree
// Unit system: none

Parameters
  kD = 0.1
  kdD = 0.1
  kdE = 0.15
  kde = 0.5
  DD = 60
  DE = 60
  Dd = 0.013
  Dde = 0.013
  lambda = 6
  L = 100
  nD = 400
  nE = 300
  height = 2 * 3

Functions
  rn1: Random "Random Function" | funcname = rand; nargs = 4; seed = 113013

Variables
  var1 "Variables 1"
    fDT = -(kD+kdD*md)*cDT
    fDD = kde*mde
    fE = kde*mde-kdE*md*cE
    rd = (kD+kdD*md)*cDT-kdE*md*cE
    rde = kdE*md*cE-kde*mde
    rDT = lambda*cDD
    rDD = -lambda*cDD
    rE = 0

Selections
  sel1: Explicit "Membrane" on boundaries 3, 4
  sel2: Explicit "Membrane boundary" on edges 2-5, 7, 8, 10, 11

Geometry
  geom1 "Geometry 1" (3D, length unit m)
    blk1: Block | size = {L, L, height}
    fin: Finalize "Form Union"

Physics
  g: GeneralFormPDE "Bulk Dynamics" on domains 1
    dependent variable c = {cDT, cDD, cE}
    ShapeProperty.order = 1
    Units.CustomSourceTermUnit = 1
    gfeq1: GeneralFormPDE (default)
      f = {rDT, rDD, rE}
      Ga = {{-DD*cDTx, -DD*cDTy, -DD*cDTz}, {-DD*cDDx, -DD*cDDy, -DD*cDDz}, {-DE*cEx, -DE*cEy, -DE*cEz}}
      da = 1
    zflx1: ZeroFluxBoundary "Zero Flux 1" (default)
    init1: init "Initial Values 1" (default) | cDT = nD*(1+0.001*rand(x,y,z,1)); cDD = 0; cE = nE*(1+pert*rand(x,y,z,2))
    flux1: FluxBoundary "Flux/Source 1" on selection sel1 | g = {fDT, fDD, fE}
  gb: GeneralFormBoundaryPDE "Membrane Dynamics" on selection sel1
    dependent variable m = {md, mde}
    ShapeProperty.order = 1
    Units.CustomSourceTermUnit = 1
    gfeq1: GeneralFormPDE (default)
      f = {rd, rde}
      Ga = {{-Dd*mdTx, -Dd*mdTy, -Dd*mdTz}, {-Dde*mdeTx, -Dde*mdeTy, -Dde*mdeTz}}
      da = {1, 0, 0, 1}
    init1: init "Initial Values 1" (default)
    zflx1: ZeroFluxBoundary "Zero Flux 1" on selection sel2

Mesh
  mesh1 "Mesh 1"
    size: MeshSizeDefault "Bulk Mesh Size" | hmax = 5; hmin = 0.001; hgrad = 1.35; custom = on
    ftri1: FreeTri "Membrane Mesh" on all boundaries | method = del
      size1: Size "Membrane Mesh Size" on boundaries 3, 4 | hmax = 0.5; hauto = 1; custom = on
    ftet1: FreeTet "Bulk Mesh" on entire geometry | method = del

Studies
  std1 "Study 1"
    time: Transient "Time Dependent" | tlist = range(0,10,1400),1400+range(0.5,0.5,100); usertol = on; rtol = 1e-6

Solver configurations
  sol1 "Solution 1" (study std1)
    v1: Variables "Dependent Variables 1"
    t1: Time "Time-Dependent Solver 1"
      tlist = range(0,10,1400),1400+range(0.5,0.5,100)
      rtol = 1e-6
      atolglobalvaluemethod = manual
      atolglobal = 1e-5
      initialstepbdf = 1e-4
      bwinitstepfrac = 1e-5
      dDef: Direct | linsolver = pardiso
      fcDef: FullyCoupled | maxiter = 12; ntolfact = 0.1

Datasets
  dset1: Solution | solution = sol1
  surf1: Surface "Mem Top" on boundaries 4 | data = dset1; param = xy
  surf2: Surface "Mem Bottom" on boundaries 3 | data = dset1; param = xy

Evaluation groups
  eg1: EvaluationGroup "Membrane Density Range" | data = dset1
    max1: MaxSurface "Maximum" on boundaries 4 | expr = {md+mde, mde}; dataseries = maximum
    min1: MinSurface "Minimum" on boundaries 4 | expr = {md+mde, mde}; dataseries = minimum

Plots
  pg1: PlotGroup2D "Mem Top Density" | data = surf1
    surf1: Surface "MinD" | expr = mde+md
    surf2: Surface "MinE" (disabled) | expr = mde
  pg2: PlotGroup2D "Mem Bottom Density" | data = surf2
    surf1: Surface "MinD" | expr = mde+md
    surf2: Surface "MinE" (disabled) | expr = mde

Exports
  anim1: Animation "Membrane Frames"
    type = imageseq
    framesel = all
    width = 500
    height = 500
    options = off
    axes = off
    synchronize = off